*Heading
** Job name: Job-1 Model name: Model-1
** Generated by: Abaqus/CAE 2021
*Preprint, echo=NO, model=NO, history=NO, contact=NO
**
** PARTS
**
*Part, name=Part-1
*Node
      1,       30500.,       25000.,      -20000.
      2,       48000.,       25000.,       -2500.
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*Element, type=C3D8
 1,  58, 659,  41,   1,  62, 677,  61,   6
 2, 659, 660,  42,  41, 677, 678,  60,  61
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*Nset, nset=_PickedSet536, internal
    1,    4,    6,    7,    9,   12
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*Elset, elset=_PickedSet536, internal, generate
 4033,  5656,     1
*Nset, nset=_PickedSet576, internal
    1,    2,    3,    4,    5,    6
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*Elset, elset=_PickedSet576, internal
    1,    2,    3,    4,    5,    6
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*Nset, nset=_PickedSet577, internal
    1,    2,    3,    4,    5,    6
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*Elset, elset=_PickedSet577, internal
   57,   58,   59,   60,   61,   62
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** Section: fault
*Solid Section, elset=_PickedSet576, material=fault
,
** Section: upp-crust
*Solid Section, elset=_PickedSet577, material=upp-crust
,
** Section: middle-crust
*Solid Section, elset=_PickedSet536, material=middel-crust
,
*End Part
**
**
** ASSEMBLY
**
*Assembly, name=Assembly
**
*Instance, name=Part-1-1, part=Part-1
*End Instance
**
*Elset, elset=fault-ele, instance=Part-1-1
    1,    2,    3,    4,    5,    6
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*Nset, nset=fault-node, instance=Part-1-1
    1,    2,    3,    4,    5,    6
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*Elset, elset=surface-ele, instance=Part-1-1
 1737, 1738, 1739, 1740, 1741, 1742
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*Nset, nset=surface-node, instance=Part-1-1
    2,    3,    5,    8,   10,   11
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*Nset, nset=_PickedSet150, internal, instance=Part-1-1
    1,    4,    6,    7,    9,   12
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*Elset, elset=_PickedSet150, internal, instance=Part-1-1, generate
 4033,  5656,     1
*Nset, nset=_PickedSet253, internal, instance=Part-1-1
   37,   38,   39,   40,  549,  550
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*Elset, elset=_PickedSet253, internal, instance=Part-1-1, generate
 4845,  5656,     1
*Nset, nset=_PickedSet254, internal, instance=Part-1-1
    3,    4,    7,    8,   11,   12
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*Elset, elset=_PickedSet254, internal, instance=Part-1-1
   25,   26,   27,   28,   53,   54
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*Nset, nset=_PickedSet255, internal, instance=Part-1-1
   17,   18,   19,   20,   21,   22
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*Elset, elset=_PickedSet255, internal, instance=Part-1-1
 1625, 1626, 1627, 1628, 1629, 1630
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*Nset, nset=_PickedSet256, internal, instance=Part-1-1
   27,   28,   29,   30,   31,   32
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*Elset, elset=_PickedSet256, internal, instance=Part-1-1
 3557, 3558, 3559, 3560, 3561, 3562
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*Nset, nset=_PickedSet257, internal, instance=Part-1-1
   17,   18,   19,   20,   21,   22
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*Nset, nset=_PickedSet293, internal, instance=Part-1-1
   21,   22,   23,   24,   25,   26
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*Elset, elset=_PickedSet293, internal, instance=Part-1-1
 1737, 1738, 1739, 1740, 1741, 1742
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*Elset, elset=_PickedSet323, internal, instance=Part-1-1
 1737, 1738, 1739, 1740, 1741, 1742
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*Nset, nset=_PickedSet329, internal, instance=Part-1-1, generate
    1,  6960,     1
*Elset, elset=_PickedSet329, internal, instance=Part-1-1, generate
    1,  5684,     1
*End Assembly
**
** MATERIALS
**
*Material, name=fault
*Density
2800.,
*Depvar
      3,
*User Material, constants=8, unsymm
 8.75e+10,  0.25, 2800., 1e+34, 2e+07, 8e+06,    5.,    0.
*Material, name=middel-crust
*Density
2800.,
*Depvar
      3,
*User Material, constants=8
 1.1e+11,  0.25, 2800., 1e+22,    0.,    0.,    0.,    0.
*Material, name=upp-crust
*Density
2800.,
*Depvar
      3,
*User Material, constants=8, unsymm
 8.75e+10,  0.25, 2800., 1e+34, 3e+07,    0.,   20.,    0.
**
** BOUNDARY CONDITIONS
**
** Name: BC-1 Type: 位移/转角
*Boundary
_PickedSet253, 3, 3
** Name: BC-2 Type: 位移/转角
*Boundary
_PickedSet254, 2, 2
** Name: BC-7 Type: 位移/转角
*Boundary
_PickedSet255, 1, 1
**
** PREDEFINED FIELDS
**
** Name: Predefined Field-1   Type: Geostatic stress
*Initial Conditions, type=STRESS, GEOSTATIC
_PickedSet329, 0., 0., -1.372e+09, -50000., 1., 1.
** ----------------------------------------------------------------
**
** STEP: Step-1
**
*Step, name=Step-1, nlgeom=YES, solver=ITERATIVE, unsymm=YES
*Static
1., 1., 1e-05, 1.
**
** LOADS
**
** Name: Load-1   Type: Gravity
*Dload
, GRAV, 9.8, 0., 0., -1.
**
** OUTPUT REQUESTS
**
*Restart, write, frequency=0
**
** FIELD OUTPUT: F-Output-1
**
*Output, field
*Node Output
U,
*Element Output, directions=YES
SDV,
*Output, history, frequency=0
*End Step
** ----------------------------------------------------------------
**
** STEP: Step-2
**
*Step, name=Step-2, nlgeom=YES, extrapolation=NO, solver=ITERATIVE, unsymm=YES
*Static
1., 1., 1e-05, 1.
**
** OUTPUT REQUESTS
**
*Restart, write, frequency=0
**
** FIELD OUTPUT: F-Output-1
**
*Output, field
*Node Output
U,
*Element Output, directions=YES
SDV,
*Output, history, frequency=0
*End Step
** ----------------------------------------------------------------
**
** STEP: Step-3
**
*Step, name=Step-3, nlgeom=YES, extrapolation=NO, amplitude=STEP, inc=100000, solver=ITERATIVE, unsymm=YES
*Static
3.15e+10, 3.15e+12, 1e-20, 3.15e+10
**
** BOUNDARY CONDITIONS
**
** Name: BC-1 Type: 位移/转角
*Boundary, op=NEW
_PickedSet253, 3, 3
** Name: BC-2 Type: 位移/转角
*Boundary, op=NEW
_PickedSet254, 2, 2
** Name: BC-5 Type: 速度/角速度
*Boundary, op=NEW, type=VELOCITY
_PickedSet256, 1, 1, 9.51e-11
** Name: BC-6 Type: 速度/角速度
*Boundary, op=NEW, type=VELOCITY
_PickedSet257, 1, 1, -9.51e-11
** Name: BC-7 Type: 位移/转角
*Boundary, op=NEW
*Adaptive Mesh, elset=_PickedSet323, frequency=1, mesh sweeps=2, op=NEW
**
** ADAPTIVE MESH CONSTRAINTS
**
** Name: Ada-Cons-1 Type: 位移/转角
*Adaptive Mesh Constraint, user
_PickedSet293
**
** CONTROLS
**
*Controls, reset
*Controls, parameters=time incrementation
, , , , , , , 50, , ,
0.5, , , , , , ,
**
** OUTPUT REQUESTS
**
*Restart, write, frequency=0
**
** FIELD OUTPUT: F-Output-1
**
*Output, field
*Node Output
U,
*Element Output, directions=YES
SDV,
*Output, history, frequency=0
*End Step
